*NODE
1, 0.0, 0.0, 0.
2, 0.03, 0.0, 0.
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*ELEMENT, TYPE=CPE4R, ELSET=WORK
1, 1, 2, 86, 85
2, 2, 3, 87, 86
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*ELEMENT, TYPE=CPE4R, ELSET=CUTLAYER
2491, 2605, 2606, 2690, 2689
2492, 2606, 2607, 2691, 2690
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*ELEMENT, TYPE=CPE4R, ELSET=TOOLE
2823, 3025, 3026, 3033, 3032
2824, 3032, 3033, 3040, 3039
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*MATERIAL, NAME=STEEL45
*ELASTIC
210000.0, 0.3
*PLASTIC, HARDENING=JOHNSON COOK
553.1, 600.8, 0.234, 1.0, 1800.0, 293.0
*RATE DEPENDENT, TYPE=JOHNSON COOK
0.0134, 1.
*DENSITY
7.85e-09
*MATERIAL, NAME=TOOLMAT
*ELASTIC
600000.0, 0.22
*DENSITY
1.5e-08
*SOLID SECTION, ELSET=WORK, MATERIAL=STEEL45
1.
*SOLID SECTION, ELSET=CUTLAYER, MATERIAL=STEEL45
1.
*SOLID SECTION, ELSET=TOOLE, MATERIAL=TOOLMAT
1.
*BOUNDARY
1, 3073, 3, 3
*NSET, NSET=WBOT
1, 2, 3, 4, 5, 6
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
*BOUNDARY
WBOT, 1, 2
*NSET, NSET=WLEFT
85, 169, 253, 337, 421, 505
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
*BOUNDARY
WLEFT, 1, 1
*NSET, NSET=TOOLTOP
3031, 3038, 3045, 3052, 3059, 3066, 3073

*AMPLITUDE, NAME=TOOLVEL, TIME=TOTAL TIME
0.0, 0.0, 0.00018, 1.0
*BOUNDARY, AMPLITUDE=TOOLVEL
TOOLTOP, 1, 1, -0.6
TOOLTOP, 2, 2, 0.
